Right = {

  AnyFolder ShoulderArm = {

      #define ARM_SIMPLE_MUSCLE_LOCAL 1*((RIGHT_ARM)*(RIGHT_ARM_SIMPLE_MUSCLE))
      #define ARM_SIMPLE_MUSCLE_ONLY_ON_NECK_LOCAL 1*((RIGHT_ARM)*(RIGHT_ARM_SIMPLE_MUSCLE_ONLY_ON_NECK))
      #define ARM_MUS_3E_LOCAL 1*((RIGHT_ARM)*(RIGHT_ARM_MUS_3E))

      #include "..\..\Arm\ShoulderArmModel.root.any"

      #undef ARM_SIMPLE_MUSCLE_LOCAL
      #undef ARM_SIMPLE_MUSCLE_ONLY_ON_NECK_LOCAL
      #undef ARM_MUS_3E_LOCAL


      //Reference to folder which contains the interface of the right side
      AnyFolder &InterfaceFolder =..Interface.Right;

      //Reference to folder
      AnyFolder &MannequinValuesFolder = ..MannequinValuesFromModel.AnyFolder_Posture.AnyFolder_Right;


      #include "../Include/SettingsShoulderArm.any"

      //-------------------------------------------------------
      // Interface references that specifies what the arm "Arm/ShoulderArm.any" should connect to
      //-------------------------------------------------------

      //This point is used for attachement of the arm to the shoulder

      AnyRefNode &ShoulderRef=..Trunk.SegmentsThorax.ThoraxSeg.ij;

      AnyRefNode &PelvisRef=..Trunk.SegmentsLumbar.PelvisSeg.Right;
      AnyRefNode &L1Ref=..Trunk.SegmentsLumbar.L1Seg.Right;
      AnyRefNode &L3Ref=..Trunk.SegmentsLumbar.L3Seg.Right;
      AnyFolder &TrunkFolderRef=..Trunk;

      #if TRUNK == 1

      AnyFolder &SkullSegRef =..Trunk.SegmentsThorax.SkullSeg.Right;
      AnyFolder &C1SegRef =..Trunk.SegmentsThorax.ThoraxSeg.Right;
      AnyFolder &C2SegRef =..Trunk.SegmentsThorax.ThoraxSeg.Right;
      AnyFolder &C3SegRef =..Trunk.SegmentsThorax.ThoraxSeg.Right;
      AnyFolder &C4SegRef =..Trunk.SegmentsThorax.ThoraxSeg.Right;
      AnyFolder &C5SegRef =..Trunk.SegmentsThorax.ThoraxSeg.Right;
      AnyFolder &C6SegRef =..Trunk.SegmentsThorax.ThoraxSeg.Right;
      AnyFolder &C7SegRef =..Trunk.SegmentsThorax.ThoraxSeg.Right;

      #else
      #endif

      #if TRUNK_NECK == 1

      AnyFolder &SkullSegRef =..Trunk.SegmentsThorax.SkullSeg.Right;
      AnyFolder &C1SegRef =..Trunk.SegmentsCervicalSpine.C1Seg.Right;
      AnyFolder &C2SegRef =..Trunk.SegmentsCervicalSpine.C2Seg.Right;
      AnyFolder &C3SegRef =..Trunk.SegmentsCervicalSpine.C3Seg.Right;
      AnyFolder &C4SegRef =..Trunk.SegmentsCervicalSpine.C4Seg.Right;
      AnyFolder &C5SegRef =..Trunk.SegmentsCervicalSpine.C5Seg.Right;
      AnyFolder &C6SegRef =..Trunk.SegmentsCervicalSpine.C6Seg.Right;
      AnyFolder &C7SegRef =..Trunk.SegmentsCervicalSpine.C7Seg.Right;

      #else
      #endif


      //This is a sign variable which indicates that this is the right side
      AnyVar Sign =1;

      AnyFolder BonesOpacity = {
        AnyVar Clavicula = Main.DrawSettings.BonesOpacity.RightClavicula;
        AnyVar Scapula = Main.DrawSettings.BonesOpacity.RightScapula;
        AnyVar Humerus = Main.DrawSettings.BonesOpacity.RightHumerus;
        AnyVar Ulna = Main.DrawSettings.BonesOpacity.RightUlna;
        AnyVar Radius = Main.DrawSettings.BonesOpacity.RightRadius;
        AnyVar Hand = Main.DrawSettings.BonesOpacity.RightHand;
      };


      AnyFolder MomentMeasure=
      {
        #if RIGHT_ARM_SIMPLE_MUSCLE == 1 | RIGHT_ARM_MUS_3E == 1
         #if RIGHT_DETAILLED_HAND == 1
           #include "..\..\Arm\ArmHandMoments.any"
         #else
           #include "..\..\Arm\ArmMoments.any"
         #endif
        #else
         AnyForceMomentMeasure ElbowJointReactionMoments =
         {
           AnyForceBase &Force = ..Jnt.FE.Constraints.Reaction;
           AnyRefFrame &Humerusfe = ..Seg.Humerus.fe;
           AnyVec3 Mlocal = M*Humerusfe.Axes;
         };

         AnyForceMomentMeasure WristJointReactionMoments =
         {
           AnyForceBase &Force = ..Jnt.WristJointFlexion.Constraints.Reaction;
           AnyRefFrame &Radiuswj = ..Seg.Radius.wj;
           AnyVec3 Mlocal = M*Radiuswj.Axes;
         };
        #endif
      };


    }; //End ShoulderArm


  };

  #if ((RIGHT_ARM_SIMPLE_MUSCLE) +(RIGHT_ARM_SIMPLE_MUSCLE_ONLY_ON_NECK) + (RIGHT_ARM_MUS_3E)) == 0
    #include "../../Arm/RightArmNoMusclesSelectedOutput.any"
  #else
   #if (RIGHT_ARM_SIMPLE_MUSCLE) == 1
    #include "../../Arm/RightArmSimpleMusclesSelectedOutput.any"
   #endif

   #if (RIGHT_ARM_SIMPLE_MUSCLE_ONLY_ON_NECK) == 1
    #include "../../Arm/RightArmSimpleMusclesOnlyNeckSelectedOutput.any"
   #endif

   #if (RIGHT_ARM_MUS_3E) == 1
    #include "../../Arm/RightArmMuscles3ESelectedOutput.any"
   #endif

  #endif
