Right = {

  AnyFolder Leg = {
    AnyVar Sign =1;
    #ifdef SignRef
      #undef SignRef
    #endif
    #define SignRef 1

    #include "<TLEM_PATH_VERSION>/ModelParameters.any"

    #define LEG_TD_SIMPLE_MUSCLES_LOCAL 1*((RIGHT_LEG_TD)*(RIGHT_LEG_TD_SIMPLE_MUSCLES))
    #define LEG_TD_MUS_3E_LOCAL 1*((RIGHT_LEG_TD)*(RIGHT_LEG_TD_MUS_3E))

    #include "..\..\LegTLEM\Leg.root.any"

    #undef LEG_TD_SIMPLE_MUSCLES_LOCAL
    #undef LEG_TD_MUS_3E_LOCAL

      //Reference to folder which contains the interface of the right side
      AnyFolder &InterfaceFolder =..Interface.Right;

      //Reference to mannequin value from model folder
      AnyFolder &MannequinValuesFolder = ..MannequinValuesFromModel.AnyFolder_Posture.AnyFolder_Right;

      #include "../Include/SettingsLeg.any"

      AnyFolder &Scaling =...Scaling;
      AnyFolder &StandardParameters =...Scaling.StandardParameters.Right;
      AnyFolder &GeoScaling =...Scaling.GeometricalScaling.Right;
      AnyFolder &MassScaling =...Scaling.MassScaling.Right;
      AnyFolder &FiberLengthScaling =...Scaling.FiberLengthScaling.Right;
      AnyFolder &StrengthScaling =...Scaling.StrengthScaling.Right;

      //AnyRefFrame &HipNodeRef = ..Trunk.SegmentsLumbar.PelvisSeg.Right;
      AnyRefNode &PsoasMajor1= ..Trunk.SegmentsLumbar.L1Seg.PML1T_TMNodeR;
      AnyRefNode &PsoasMajor2= ..Trunk.SegmentsLumbar.L2Seg.PML2T_TMNodeR;
      AnyRefNode &PsoasMajor3= ..Trunk.SegmentsLumbar.L3Seg.PML3T_TMNodeR;
      AnyRefNode &PsoasMajor4= ..Trunk.SegmentsLumbar.L4Seg.PML4T_TMNodeR;
      AnyRefNode &PsoasMajor5= ..Trunk.SegmentsLumbar.L5Seg.PML5T_TMNodeR;

       AnyFolder BonesOpacity = {
        AnyVar Foot = Main.DrawSettings.BonesOpacity.RightFoot;
        AnyVar Shank = Main.DrawSettings.BonesOpacity.RightShank;
        AnyVar Thigh = Main.DrawSettings.BonesOpacity.RightThigh;
        AnyVar Talus = Main.DrawSettings.BonesOpacity.RightTalus;
        AnyVar Patella = Main.DrawSettings.BonesOpacity.RightPatella;
      };

      #if ((RIGHT_LEG_TD_SIMPLE_MUSCLES) + (RIGHT_LEG_TD_MUS_3E)) == 0
       AnyFolder MomentMeasure=
       {
         #if TRUNK_SIMPLE_MUSCLES == 1
           #define LEG_WITH_PSOAS_MUSCLES
           AnyFolder &TrunkMuscles = ...Trunk.MusclesSpineRight;
         #endif

         #define LEG_WITH_JOINT_MUSCLES
         #include "..\..\LegTLEM\LegMoments.any"
         #undef LEG_WITH_JOINT_MUSCLES

         #ifdef LEG_WITH_PSOAS_MUSCLES
           #undef LEG_WITH_PSOAS_MUSCLES
         #endif
       };
      #else
       AnyFolder MomentMeasure=
       {
         AnyFolder &TrunkMuscles = ...Trunk.MusclesSpineRight;
         #include "..\..\LegTLEM\LegMoments.any"
       };
      #endif

    };//End Leg

  };


  Trunk =
  {
    AnyRefFrame &PsoasMajorRightReference=.Right.Leg.Seg.Thigh;
  };

//  #if ((RIGHT_LEG_TD_SIMPLE_MUSCLES) + (RIGHT_LEG_TD_MUS_3E)) == 0
//    #include "../../LegTLEM/RightLegNoMusclesSelectedOutput.any"
//  #else
//    #if (RIGHT_LEG_TD_SIMPLE_MUSCLES) == 1
//      #include "../../LegTLEM/RightLegSimpleMusclesSelectedOutput.any"
//    #endif
//
//    #if (RIGHT_LEG_TD_MUS_3E) == 1
//      #include "../../LegTLEM/RightLegMuscles3ESelectedOutput.any"
//    #endif
//  #endif
  #include "../../LegTLEM/RightLegSelectedOutput.any"

  #if RIGHT_LEG_TD_SIMPLE_MUSCLES == 1 | RIGHT_LEG_TD_MUS_3E == 1
    #ifdef TRUNK_NO_MUSCLES
      #include "RightPsoas.any"
    #else
    #endif
  #endif
