//This file controls which calibrations to be made on the model
AnyFolder Calibration={

  #if RIGHT_LEG_TD + RIGHT_LEG_TD_MUS_3E == 2
  #include "<ANYBODY_PATH_BODY>LegTD-FootGM/CalibrationSequenceRight.any"
  #define RIGHT_LEG_TD_CALIBRATION 1
  #else
  #define RIGHT_LEG_TD_CALIBRATION 0
  #endif

  #if LEFT_LEG_TD + LEFT_LEG_TD_MUS_3E == 2
  #include "<ANYBODY_PATH_BODY>LegTD-FootGM/CalibrationSequenceLeft.any"
  #define LEFT_LEG_TD_CALIBRATION 1
  #else
  #define LEFT_LEG_TD_CALIBRATION 0
  #endif

  #if RIGHT_LEG + RIGHT_LEG_MUS_3E == 2
  #include "<ANYBODY_PATH_BODY>Leg/CalibrationSequenceRight.any"
  #define RIGHT_LEG_CALIBRATION 1
  #else
  #define RIGHT_LEG_CALIBRATION 0
  #endif

  #if LEFT_LEG + LEFT_LEG_MUS_3E == 2
  #include "<ANYBODY_PATH_BODY>Leg/CalibrationSequenceLeft.any"
  #define LEFT_LEG_CALIBRATION 1
  #else
  #define LEFT_LEG_CALIBRATION 0
  #endif

  #if RIGHT_ARM + RIGHT_ARM_MUS_3E == 2
    #if TRUNK_NECK == 1
    #include "<ANYBODY_PATH_BODY>Arm/CalibrationSequenceNeckRight.any"
    #else
    #include "<ANYBODY_PATH_BODY>Arm/CalibrationSequenceRight.any"
    #endif
  #define RIGHT_ARM_CALIBRATION 1
  #else
  #define RIGHT_ARM_CALIBRATION 0
  #endif

  #if LEFT_ARM + LEFT_ARM_MUS_3E == 2
    #if TRUNK_NECK == 1
    #include "<ANYBODY_PATH_BODY>Arm/CalibrationSequenceNeckLeft.any"
    #else
    #include "<ANYBODY_PATH_BODY>Arm/CalibrationSequenceLeft.any"
    #endif
  #define LEFT_ARM_CALIBRATION 1
  #else
  #define LEFT_ARM_CALIBRATION 0
  #endif

  #ifdef LumbarLigaments
    #include "<ANYBODY_PATH_BODY>Trunk/CalibrationSequence.any"
    #define LUMBAR_LIG_CALIBRATION 1
  #else
    #define LUMBAR_LIG_CALIBRATION 0
  #endif

  #if RIGHT_LEG_TD + RIGHT_DETAILLED_FOOT + RIGHT_LEG_TD_SIMPLE_MUSCLES + RIGHT_LEG_TD_MUS_3E == 3
  #include "<ANYBODY_PATH_BODY>FootGM/CalibrationSequenceRight.any"
  #define RIGHT_FOOT_CALIBRATION 1
  #else
  #define RIGHT_FOOT_CALIBRATION 0
  #endif

  #if LEFT_LEG_TD + LEFT_DETAILLED_FOOT + LEFT_LEG_TD_SIMPLE_MUSCLES + LEFT_LEG_TD_MUS_3E == 3
  #include "<ANYBODY_PATH_BODY>FootGM/CalibrationSequenceLeft.any"
  #define LEFT_FOOT_CALIBRATION 1
  #else
  #define LEFT_FOOT_CALIBRATION 0
  #endif


  #if RIGHT_LEG_TD_CALIBRATION + LEFT_LEG_TD_CALIBRATION + RIGHT_LEG_CALIBRATION + LEFT_LEG_CALIBRATION + RIGHT_ARM_CALIBRATION + LEFT_ARM_CALIBRATION + LUMBAR_LIG_CALIBRATION + RIGHT_FOOT_CALIBRATION + LEFT_FOOT_CALIBRATION == 0
  AnyOperationDummy CalibrationSequence ={};
  #else
  AnyOperationSequence CalibrationSequence ={};
  #endif

};
