RGB = Main.DrawSettings.Muscle.RGB;
Visible = Main.DrawSettings.Muscle.Visible;
Bulging = Main.DrawSettings.Muscle.Bulging;
ColorScale = Main.DrawSettings.Muscle.ColorScale;
//RGBColorScale = Main.DrawSettings.Muscle.RGBColorScale;
MaxStress = Main.DrawSettings.Muscle.MaxStress;
Opacity = Main.DrawSettings.Muscle.Opacity;
DrawScaleOnOff=Main.DrawSettings.Muscle.DrawScaleOnOff;


//#include "DrawMuscleForce.any"
