SelectedOutput.Left = {

  AnyFolder Leg = {


    AnyFolder JointReactionForce = {


      /// Medial positive
      AnyVar Hip_MediolateralForce = ....Left.Leg.Jnt.Hip.Constraints.Reaction.Fout[2];
      /// Proximal positive
      AnyVar Hip_ProximoDistalForce = ....Left.Leg.Jnt.Hip.Constraints.Reaction.Fout[1];
      /// Anterior positive
      AnyVar Hip_AnteroPosteriorForce = ....Left.Leg.Jnt.Hip.Constraints.Reaction.Fout[0];
      // Thigh.HipJoint ref

      /// Medial positive
      AnyVar Knee_MedioLateralForce = ....Left.Leg.Jnt.Knee.Constraints.Reaction.Fout[2];
      /// Proximal positive
      AnyVar Knee_ProximoDistalForce = ....Left.Leg.Jnt.Knee.Constraints.Reaction.Fout[1];
      /// Anterior positive
      AnyVar Knee_AnteroPosteriorForce = ....Left.Leg.Jnt.Knee.Constraints.Reaction.Fout[0];
      /// External positive
      AnyVar Knee_AxialMoment = ....Left.Leg.MomentMeasure.KneeJointReactionMoments.Mlocal[1];
      /// Internal positive
      AnyVar Knee_LateralMoment = ....Left.Leg.MomentMeasure.KneeJointReactionMoments.Mlocal[0];
      // Thigh.KneeJoint ref

      /// Medial positive
      AnyVar Ankle_MedioLateralForce = ....Left.Leg.Jnt.Ankle.Constraints.Reaction.Fout[2];
      /// Proximal positive
      AnyVar Ankle_ProximoDistalForce = ....Left.Leg.Jnt.Ankle.Constraints.Reaction.Fout[1];
      /// Anterior positive
      AnyVar Ankle_AnteroPosteriorForce = ....Left.Leg.Jnt.Ankle.Constraints.Reaction.Fout[0];
      /// External positive
      AnyVar Ankle_AxialMoment = ....Left.Leg.MomentMeasure.AnkleJointReactionMoments.Mlocal[1];
      // Shank.AnkleJoint ref


      //****************************************************

//      /// External positive
//      AnyVar Ankle_LateralMoment = ....Left.Leg.Jnt.Ankle.Constraints.Reaction.Fout[4];
//      // Shank.AnkleJoint ref
//
//      /// Lateral positive
//      AnyVar Talus_MedioLateralForce = ....Left.Leg.Jnt.SubTalar.Constraints.Reaction.Fout[0];
//      /// Proximal positive
//      AnyVar Talus_ProximoDistalForce = ....Left.Leg.Jnt.SubTalar.Constraints.Reaction.Fout[1];
//      /// Anterior positive
//      AnyVar Talus_AnteroPosteriorForce = ....Left.Leg.Jnt.SubTalar.Constraints.Reaction.Fout[2];
//      /// External positive
//      AnyVar Talus_AxialMoment = ....Left.Leg.Jnt.SubTalar.Constraints.Reaction.Fout[3];
//      /// Flexion positive
//      AnyVar Talus_FlexionExtensionMoment = ....Left.Leg.Jnt.SubTalar.Constraints.Reaction.Fout[4];
//      // Talus.SubTalarJoint ref


    }; //End JointReactionForce


    AnyFolder JointMomentMeasure = {


      AnyVar HipAbduction = ....Left.Leg.MomentMeasure.HipNetMomentMuscle.MHipAbduction;

      AnyVar HipFlexion = ....Left.Leg.MomentMeasure.HipNetMomentMuscle.MHipFlexion;

      AnyVar HipExternalRotation = ....Left.Leg.MomentMeasure.HipNetMomentMuscle.MHipExternalRotation;
      // HipNodeRef.RotNode ref

      AnyVar KneeFlexion = -....Left.Leg.MomentMeasure.KneeNetMomentMuscle.MKneeFlexion;
      // Shank.KneeJoint.RotNode ref

      AnyVar AnklePlantarFlexion = ....Left.Leg.MomentMeasure.AnklePlantarFlexionNetMomentMuscle.MPlantarFlexion;
      // Shank.AnkleJoint ref

      AnyVar SubTalarEversion = ....Left.Leg.MomentMeasure.SubTalarEversionNetMomentMuscle.MSubTalarEversion;
      // Talus.SubTalarJoint ref


    }; //End JointMomentMeasure


    AnyFolder Muscles =
    {
      AnySearchFun MuscleList =
      {
        #if ((LEFT_LEG_TD_SIMPLE_MUSCLES) + (LEFT_LEG_TD_MUS_3E)) == 0
          Search = ".....Left.Leg.JointMuscles.*.*.dof0.Muscle.*.Activity";
        #else
          Search = ".....Left.Leg.Mus.*.Activity";
        #endif
      };

      AnyVar Envelope = max(MuscleList());


    }; //End Muscles


  }; //End Leg


}; //End Left
