//include stiffness in normal spine
//Schmidt et al. The Stiffness of lumbar spinal motion segments with a high intensity zone in the anulus fibrosus
//Spine Vol23(20), 1998, pp2167-2173
//
//See also:
//S. Dendorfer; J. Rasmussen; S. Tørholm and B. Robie, The Effect of Spinal Disc Herniation on Multifidus Muscles, 56th Annual Orthopaedic Research Society Meeting, New Orleans, USA, 2010
//B. Robie, J. Rasmussen; S. Tørholm and S. Dendorfer, Herniation Induces 55% Increase in Load of Key Stabilizing Muscle - Impact on Herniation Treatment Devices?, Spine Arthoplasty Society meeting, New Orleans, USA, 2010
//SD


AnyFolder &Trunkref = Main.HumanModel.BodyModel.Trunk;

Trunkref = {
  AnyFolder DiscStiffness = {

   #ifndef LumbarLigaments
   	AnyFloat coef = 1.0;
   #else
       AnyFloat coef = 0.3;
   #endif

    AnyFloat AxialRot = 8.4;
    AnyFloat Flex = coef*1.8;
    AnyFloat Ext = coef*2.6;
    AnyFloat Latbend = 2.3;


    //L5Sacrum
    AnyFolder S1L5stiff = {
      AnyFloat A = iffun(gtfun(Main.HumanModel.BodyModel.Trunk.JointsLumbar.L5SacrumJnt.Pos[2],0), 0, 1);
      AnyFloat B = iffun(gtfun(Main.HumanModel.BodyModel.Trunk.JointsLumbar.L5SacrumJnt.Pos[2],0), 1, 0);

      AnyForce L5Sacrum =
      {
        F = {(-1)*..Latbend*Main.HumanModel.BodyModel.Trunk.JointsLumbar.L5SacrumJnt.Pos[0]*180/pi,
          (-1)*..AxialRot*Main.HumanModel.BodyModel.Trunk.JointsLumbar.L5SacrumJnt.Pos[1]*180/pi,
          (-1)*(.A*..Flex*Main.HumanModel.BodyModel.Trunk.JointsLumbar.L5SacrumJnt.Pos[2]*180/pi+
          .B*..Ext*Main.HumanModel.BodyModel.Trunk.JointsLumbar.L5SacrumJnt.Pos[2]*180/pi)};
        AnyKinMeasure &L5S1 = Main.HumanModel.BodyModel.Trunk.JointsLumbar.L5SacrumJnt;
      };
    };

    //L4L5
    AnyFolder L4L5stiff = {
      AnyFloat A = iffun(gtfun(Main.HumanModel.BodyModel.Trunk.JointsLumbar.L4L5Jnt.Pos[2],0), 0, 1);
      AnyFloat B = iffun(gtfun(Main.HumanModel.BodyModel.Trunk.JointsLumbar.L4L5Jnt.Pos[2],0), 1, 0);

      AnyForce L4L5 =
      {
        F = {(-1)*..Latbend*Main.HumanModel.BodyModel.Trunk.JointsLumbar.L4L5Jnt.Pos[0]*180/pi,
          (-1)*..AxialRot*Main.HumanModel.BodyModel.Trunk.JointsLumbar.L4L5Jnt.Pos[1]*180/pi,
          (-1)*(.A*..Flex*Main.HumanModel.BodyModel.Trunk.JointsLumbar.L4L5Jnt.Pos[2]*180/pi+
          .B*..Ext*Main.HumanModel.BodyModel.Trunk.JointsLumbar.L4L5Jnt.Pos[2]*180/pi)};
        AnyKinMeasure &L4L5 = Main.HumanModel.BodyModel.Trunk.JointsLumbar.L4L5Jnt;
      };
    };

    //L4L3
    AnyFolder L4L3stiff = {
      AnyFloat A = iffun(gtfun(Main.HumanModel.BodyModel.Trunk.JointsLumbar.L3L4Jnt.Pos[2],0), 0, 1);
      AnyFloat B = iffun(gtfun(Main.HumanModel.BodyModel.Trunk.JointsLumbar.L3L4Jnt.Pos[2],0), 1, 0);

      AnyForce L3L4 =
      {
        F = {(-1)*..Latbend*Main.HumanModel.BodyModel.Trunk.JointsLumbar.L3L4Jnt.Pos[0]*180/pi,
          (-1)*..AxialRot*Main.HumanModel.BodyModel.Trunk.JointsLumbar.L3L4Jnt.Pos[1]*180/pi,
          (-1)*(.A*..Flex*Main.HumanModel.BodyModel.Trunk.JointsLumbar.L3L4Jnt.Pos[2]*180/pi+
          .B*..Ext*Main.HumanModel.BodyModel.Trunk.JointsLumbar.L3L4Jnt.Pos[2]*180/pi)};
        AnyKinMeasure &L3L4 = Main.HumanModel.BodyModel.Trunk.JointsLumbar.L3L4Jnt;
      };
    };

    //L3L2
    AnyFolder L3L2stiff = {
      AnyFloat A = iffun(gtfun(Main.HumanModel.BodyModel.Trunk.JointsLumbar.L2L3Jnt.Pos[2],0), 0, 1);
      AnyFloat B = iffun(gtfun(Main.HumanModel.BodyModel.Trunk.JointsLumbar.L2L3Jnt.Pos[2],0), 1, 0);

      AnyForce L2L3 =
      {
        F = {(-1)*..Latbend*Main.HumanModel.BodyModel.Trunk.JointsLumbar.L2L3Jnt.Pos[0]*180/pi,
          (-1)*..AxialRot*Main.HumanModel.BodyModel.Trunk.JointsLumbar.L2L3Jnt.Pos[1]*180/pi,
          (-1)*(.A*..Flex*Main.HumanModel.BodyModel.Trunk.JointsLumbar.L2L3Jnt.Pos[2]*180/pi+
          .B*..Ext*Main.HumanModel.BodyModel.Trunk.JointsLumbar.L2L3Jnt.Pos[2]*180/pi)};
        AnyKinMeasure &L2L3 = Main.HumanModel.BodyModel.Trunk.JointsLumbar.L2L3Jnt;
      };
    };

    //L2L1
    AnyFolder L2L1stiff = {
      AnyFloat A = iffun(gtfun(Main.HumanModel.BodyModel.Trunk.JointsLumbar.L1L2Jnt.Pos[2],0), 0, 1);
      AnyFloat B = iffun(gtfun(Main.HumanModel.BodyModel.Trunk.JointsLumbar.L1L2Jnt.Pos[2],0), 1, 0);

      AnyForce L1L2 =
      {
        F = {(-1)*..Latbend*Main.HumanModel.BodyModel.Trunk.JointsLumbar.L1L2Jnt.Pos[0]*180/pi,
          (-1)*..AxialRot*Main.HumanModel.BodyModel.Trunk.JointsLumbar.L1L2Jnt.Pos[1]*180/pi,
          (-1)*(.A*..Flex*Main.HumanModel.BodyModel.Trunk.JointsLumbar.L1L2Jnt.Pos[2]*180/pi+
          .B*..Ext*Main.HumanModel.BodyModel.Trunk.JointsLumbar.L1L2Jnt.Pos[2]*180/pi)};
        AnyKinMeasure &L1L2 = Main.HumanModel.BodyModel.Trunk.JointsLumbar.L1L2Jnt;
      };
    };

    //L1T12
    AnyFolder T12L1stiff = {
      AnyFloat A = iffun(gtfun(Main.HumanModel.BodyModel.Trunk.JointsLumbar.T12L1Jnt.Pos[2],0), 0, 1);
      AnyFloat B = iffun(gtfun(Main.HumanModel.BodyModel.Trunk.JointsLumbar.T12L1Jnt.Pos[2],0), 1, 0);

      AnyForce T12L1 =
      {
        F = {(-1)*..Latbend*Main.HumanModel.BodyModel.Trunk.JointsLumbar.T12L1Jnt.Pos[0]*180/pi,
          (-1)*..AxialRot*Main.HumanModel.BodyModel.Trunk.JointsLumbar.T12L1Jnt.Pos[1]*180/pi,
          (-1)*(.A*..Flex*Main.HumanModel.BodyModel.Trunk.JointsLumbar.T12L1Jnt.Pos[2]*180/pi+
          .B*..Ext*Main.HumanModel.BodyModel.Trunk.JointsLumbar.T12L1Jnt.Pos[2]*180/pi)};
        AnyKinMeasure &T12L1 = Main.HumanModel.BodyModel.Trunk.JointsLumbar.T12L1Jnt;
      };
    };
  };
};
